n := 2
a := -3*n
b := 3*n
a = -6
b = 6
A := runif(3, a, b)
# B=runif (3,а,b)
B := runif(3, a, b)
C := runif(3, a, b)
# C=runif (3,а,b)
A = [3.39983; 0.238514; 4.51162]
B = [-2.68935; 1.05494; 4.05129]
C = [-0.180833; 2.92473; -0.504291]
s := A*B
N := B×C
s = 9.38616
N = [-12.3809; -2.08882; -7.67487]
w := (A×B)*C
w = -77.2174
dA := sqrt(A[0]^2 + A[1]^2 + A[2]^2)
dB := sqrt(B[0]^2 + B[1]^2 + B[2]^2)
dC := sqrt(C[0]^2 + C[1]^2 + C[2]^2)
dA = 5.65424
dB = 4.97579
dC = 2.97339
Array := [dA; dB; dC]
MaxFromArray := max(Array)
MaxFromArray = 5.65424
