n := 1 .. 10 = [1; 2; 3; 4; 5; 6; 7; 8; 9; 10]
x := 2
y := (sqrt(x^3 + n) + cos(|n*x - 1|)^2)/nthroot(x^5 + sin(x) + n, 4)
y = [1.28951; 1.34694; 1.40051; 1.45076; 1.4981; 1.54288; 1.58537; 1.62581; 1.66441; 1.70133]
