n := 1
x^3 + (4 - n)*x^2 + (3 - 4*n)*x - 3*n = 0  # error: Эта переменная не определена.
M := [3*n, (3 - 4*n), (4 - n), 1]
V := [3*n; 3 - 4*n; 4 - n; 1]
X := polyroots(V)
X = [-3.5251; 0.262551 - 0.884368i; 0.262551 + 0.884368i]
