h(x, y) := sin(sqrt(x^2 + y^2))/sqrt(x^2 + y^2)
x1 := -15
x2 := 15
Δx := 1
Nx := 43
y1 := -15
y2 := 15
Δy := 1
Ny := 43
i := 0 .. Nx - 1
x[i] := x1 + i*Δx
j := 0 .. Ny - 1
y[j] := y1 + j*Δy
M[i, j] := h(x[i], y[j])
# [component: inputs M]
