n := 4
x := 0 .. n + sqrt(n) + 2
y1(x) := (x - n)^2 - n
y2(x) := (x - n)/2
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Given
x := 2
y := -1
(x - n)^2 - y - n == 0
x - 2*y - n == 0
Find(x, y) = [2.23444; -0.882782]
Given
x := 5
y := 0
(x - n)^2 - y - n == 0
x - 2*y - n == 0
Find(x, y) = [6.26556; 1.13278]
