# 1. Найдем уравнения прямых, включающих отрезки AB, CD
A(2, 12)*и*B(5, 9)
C(2, 3)*и*D(5, 6)
X_AB := [2; 5]
X_CD := [2; 5]
x1 := 2
x2 := 5
х1 := 2
х2 := 5
y1 := 12
y2 := 9
у1 := 3
у2 := 6
a := (y2 - y1)/(x2 - x1) = -1
Y_AB := [12; 9]
Y_CD := [3; 6]
а := (у2 - у1)/(х2 - х1) = 1
b := x1 - a*y1 = 14
в := -х1 + а*у1 = 1
f1(x) := a*x + b
f2(x) := а*x + в
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# 2. Найдем точку P пересечения прямых AB и CD
xx := 1
f(xx) := f1(xx) - f2(xx)
x0 := root(f(xx), xx) = 6.5
y0 := f1(x0) = 7.5
# (6.5, 7.5) - координаты точки P в МСК
# 3. Найдем новые координаты точек
P := [2, 5, 2, 5; 12, 9, 3, 6; 1, 1, 1, 1]  # - матрица координат
ϕ := 135
ϕ_rad := ϕ*π/180
Rs(ϕ) := [cos(ϕ), -sin(ϕ), 0; sin(ϕ), cos(ϕ), 0; 0, 0, 1]  # - поворот системы координат на угол
ϕ := 180
ϕ := 180
ϕ := 180
Ts(dx, dy) := [1, 0, -dx; 0, 1, -dy; 0, 0, 1]  # - матрица для смещения начала СК:
A1 := Ts(x0, y0)*P = [-4.5, -1.5, -4.5, -1.5; 4.5, 1.5, -4.5, -1.5; 1, 1, 1, 1]  # - смещаем систему координат в точку Р
A2 := Rs(ϕ_rad)*A1 = [0, 0, 6.36396, 2.12132; -6.36396, -2.12132, 0, 0; 1, 1, 1, 1]  # - поворачиваем систему координат на угол ϕ
A3 := Ts(-x0, -y0)*A2 = [6.5, 6.5, 12.864, 8.62132; 1.13604, 5.37868, 7.5, 7.5; 1, 1, 1, 1]  # - снова смещаем СК в исходное положение
X_AB_New := [6.5; 6.5]
Y_AB_New := [1.136; 5.379]
X_CD_New := [12.864; 8.621]
Y_CD_New := [7.5; 7.5]
# Верхняя строка - абсциссы вершин отрезка, нижняя - ординаты
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A3 := Ts(-x0, -y0)*A2 = [6.5, 6.5, 12.864, 8.62132; 1.13604, 5.37868, 7.5, 7.5; 1, 1, 1, 1]  # - снова смещаем СК в исходное положение
X_AB_New := [12.864; 8.621]
Y_AB_New := [7.5; 7.5]
X_CD_New := [6.5; 6.5]
Y_CD_New := [13.864; 9.621]
